OpenVSP model (file version 5), 9 components.
Geometry view with OpenVSP parameter names; values to 6 digits, angles in degrees, lengths in the model's unit.
Overall bounding box: X_Min=-38.3342 X_Len=76.6683 Y_Min=-13.9529 Y_Len=20.6673 Z_Min=-65.3408 Z_Len=65.3408

Fuselage "FuselageGeom"
  location (X Y Z) 0 0 0, rotation 0 90 0
  bounding box size 9.9 9.9 60
  Design: Length=60
  cross sections:
    n   XLocPercent  YLocPercent  ZLocPercent  shape
    0   0            0            0            point
    1   0.1          0            0            ellipse Ellipse_Height=6.4 Ellipse_Width=4.6
    2   0.18         -0.00533333  0            ellipse Ellipse_Height=8.4 Ellipse_Width=5.8
    3   0.3125       -0.0263333   0            rounded rectangle RoundRectXSec_Radius=4 RoundedRect_Height=9.7 RoundedRect_Width=9.6
    4   0.375        -0.0266667   0            rounded rectangle RoundRectXSec_Radius=3.6 RoundedRect_Height=9.9 RoundedRect_Width=9.9
    5   0.5          -0.0266667   0            rounded rectangle RoundRectXSec_Radius=4 RoundedRect_Height=9.6 RoundedRect_Width=9.9
    6   0.625        -0.025       0            ellipse Ellipse_Height=8.36 Ellipse_Width=9.2
    7   0.75         -0.016       0            ellipse Ellipse_Height=5.5 Ellipse_Width=6.6
    8   0.85         -0.0123333   0            ellipse Ellipse_Height=3.3 Ellipse_Width=4.5
    9   0.9375       -0.00833333  0            ellipse Ellipse_Height=1.75 Ellipse_Width=2.6
    10  1            -0.00666667  0            point

Wing "WingGeom", child of "FuselageGeom"
  location (X Y Z) 0 1.5 -18.5, rotation -87 0 90
  symmetric about YZ
  bounding box size 76.6683 3.09429 13.9813
  totals: TotalSpan=76 TotalProjectedSpan=75.8958 TotalChord=10.9 TotalArea=828.4 TotalAR=6.95338
  root: chord 14, twist 0, NACA 4-series Camber=0 CamberLoc=0.2 ThickChord=0.1
  sections:
    n  Span  Root_Chord  Tip_Chord  Area   Sweep  Sweep_Location  Dihedral  Twist  Twist_Location  tip airfoil
    1  38    14          7.8        414.2  5      0               -3        0      0.25            as above

Wing "WingGeom"
  location (X Y Z) 0 -0.6 -44, rotation -180 -90 0
  bounding box size 1.50087 13.3529 21.3408
  totals: TotalSpan=13 TotalProjectedSpan=13 TotalChord=11.2 TotalArea=145.6 TotalAR=1.16071
  root: chord 15, twist 0, NACA 4-series Camber=0 CamberLoc=0.2 ThickChord=0.1
  sections:
    n  Span  Root_Chord  Tip_Chord  Area   Sweep  Sweep_Location  Dihedral  Twist  Twist_Location  tip airfoil
    1  13    15          7.4        145.6  47     0               0         0      0.25            as above

Wing "WingGeom"
  location (X Y Z) 0 -0.6 -51, rotation 90 0 -90
  symmetric about YZ
  bounding box size 33.6446 1.61939 9
  totals: TotalSpan=32.8 TotalProjectedSpan=32.755 TotalChord=7.5 TotalArea=246 TotalAR=4.36135
  root: chord 9, twist 0, NACA 4-series Camber=0 CamberLoc=0.2 ThickChord=0.1
  sections:
    n  Span  Root_Chord  Tip_Chord  Area  Sweep  Sweep_Location  Dihedral  Twist  Twist_Location  tip airfoil
    1  16.4  9           6          123   6.5    0               3         0      0.25            as above

Pod "PodGeom"
  location (X Y Z) 14 -0.95 -13.2, rotation 0 90 0
  bounding box size 5 5 20
  Design: FineRatio=8 Length=20

Pod "PodGeom"
  location (X Y Z) -14 -0.95 -13.2, rotation 0 90 0
  bounding box size 5 5 20
  Design: FineRatio=8 Length=20

Propeller "PropGeom"
  location (X Y Z) 14 -1.3 -15.6, rotation 0 90 0
  bounding box size 14.3768 12.5643 0.795151
  Design: Diameter=16 NumBlade=3 Beta34=20 UseBeta34Flag=1 Feather=0 Rotate=0 Precone=0 ReverseFlag=0 FoldAngle=0 PropMode=0 AF=151.538 CLi=0.538798 Chord=0.177656 Solidity=0.169649 ConstructXoC=0.5 FeatherAxisXoC=0.5 FeatherOffsetXoC=0
  cross sections:
    n  RadiusFrac  shape
    0  0.2         ellipse Ellipse_Height=0.32 Ellipse_Width=0.64
    1  0.4         NACA 16-series Chord=1.33 IdealCl=0.7 ThickChord=0.144074
    2  1           NACA 16-series Chord=1.04 IdealCl=0.2 ThickChord=0.03
  Chord along r/R (cubic Bezier): 0.2: 0.08, 0.333333: 0.15, 0.466667: 0.2, 0.6: 0.2, 0.716667: 0.2, 0.833333: 0.2, 0.95: 0.2, 0.966667: 0.2, 0.983333: 0.2, 1: 0.13
  Twist along r/R (PCHIP): 0.2: 46.75, 0.75: 20, 1: 13
  Thick along r/R (cubic Bezier): 0.2: 0.5, 0.233333: 0.3, 0.266667: 0.225, 0.3: 0.2, 0.4: 0.125, 0.5: 0.115, 0.6: 0.1, 0.733333: 0.075, 0.866667: 0.055, 1: 0.03
  CLI along r/R (cubic Bezier): 0.2: 0, 0.266667: 0.7, 0.333333: 0.7, 0.4: 0.7, 0.466667: 0.7, 0.533333: 0.7, 0.6: 0.7, 0.733333: 0.7, 0.866667: 0.7, 1: 0.2

Propeller "PropGeom"
  location (X Y Z) -14 -1.3 -15.6, rotation 0 90 0
  bounding box size 14.3768 12.5643 0.795151
  Design: Diameter=16 NumBlade=3 Beta34=20 UseBeta34Flag=1 Feather=0 Rotate=0 Precone=0 ReverseFlag=0 FoldAngle=0 PropMode=0 AF=151.538 CLi=0.538798 Chord=0.177656 Solidity=0.169649 ConstructXoC=0.5 FeatherAxisXoC=0.5 FeatherOffsetXoC=0
  cross sections:
    n  RadiusFrac  shape
    0  0.2         ellipse Ellipse_Height=0.32 Ellipse_Width=0.64
    1  0.4         NACA 16-series Chord=1.33 IdealCl=0.7 ThickChord=0.144074
    2  1           NACA 16-series Chord=1.04 IdealCl=0.2 ThickChord=0.03
  blade curves as in "PropGeom"

Mesh "MeshGeom"
  location (X Y Z) 0 0 0, rotation 0 0 0
  triangle mesh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
